/POST26 	!Postprocessor im Frequenzbereich
NUMVAR, 200	!Anzahl der möglichen Variablen (default 10)
!-------------------------------------------------------------------------------------------!
!-------------------------------------------------------------------------------------------!
!------------------------------------ node: floor centre -----------------------------------!
NSEL,S,LOC,X,0
NSEL,R,LOC,Y,0
NSEL,R,LOC,Z,0
*GET,n_center_0,NODE,,NUM,MIN
NSEL,All

!*CREATE,ansuitmp                                         ! Create a command macro file
!-------------------------------------------------------------------------------------------!
!-------------------------------------------------------------------------------------------!

NSOL, 101, n_center_0, U, Z, Center_0
prvar,101
*DIM,Disp_Center_Z_0_Vs%Vs%,ARRAY,nfreq,5,1
*do,ifreq,1,nfreq,1
    freq = StarFreq+(ifreq-1)*FreqIncr                                	 !FD
	*GET,Disp_Center_Z_0_Vs%Vs%(ifreq,1),VARI,1,REAL,(ifreq-1)*FreqIncr
    *GET,Disp_Center_Z_0_Vs%Vs%(ifreq,2),VARI,101,AMPL,(ifreq-1)*FreqIncr
    *GET,Disp_Center_Z_0_Vs%Vs%(ifreq,3),VARI,101,PHASE,(ifreq-1)*FreqIncr
    *GET,Disp_Center_Z_0_Vs%Vs%(ifreq,4),VARI,101,REAL,(ifreq-1)*FreqIncr
    *GET,Disp_Center_Z_0_Vs%Vs%(ifreq,5),VARI,101,IMAG,(ifreq-1)*FreqIncr
*enddo

/MKDIR,Results_Ansys\onlyfooting\n_storeys_%n_storeys%_n_rooms_X_%n_roomsx%_n_rooms_Y_%n_roomsy%_l%l%_by_b%b%_ftyp_%ftyp%_Vs_%Vs%_Lf_%L_f%_Bf_%B_f%
*CFOPEN,'Results_Ansys\onlyfooting\n_storeys_%n_storeys%_n_rooms_X_%n_roomsx%_n_rooms_Y_%n_roomsy%_l%l%_by_b%b%_ftyp_%ftyp%_Vs_%Vs%_Lf_%L_f%_Bf_%B_f%\Disp_Center_Z_0_Vs%Vs%','csv',              ! Open a command file
*VWRITE
(2x,'Freq',14x,'AMPL',14x,'PHASE',10x,'REAL',10x,'IMAG')
*VWRITE,Disp_Center_Z_0_Vs%Vs%(1,1),Disp_Center_Z_0_Vs%Vs%(1,2),Disp_Center_Z_0_Vs%Vs%(1,3),Disp_Center_Z_0_Vs%Vs%(1,4),Disp_Center_Z_0_Vs%Vs%(1,5),,,,       ! Write the data to a file
(E14.7,2x,E14.7,2x,E14.7,2x,E14.7,2x,E14.7)
*CFCLOS

!-------------------------------------------------------------------------------------------!
!-------------------------------------------------------------------------------------------!
NSEL,All
NSOL, 102, n_center_0, U, X, Center_0
prvar,102
*DIM,Disp_Center_X_0_Vs%Vs%,ARRAY,nfreq,5,1
*do,ifreq,1,nfreq,1
    freq = StarFreq+(ifreq-1)*FreqIncr                                	 !FD
	*GET,Disp_Center_X_0_Vs%Vs%(ifreq,1),VARI,1,REAL,(ifreq-1)*FreqIncr
    *GET,Disp_Center_X_0_Vs%Vs%(ifreq,2),VARI,102,AMPL,(ifreq-1)*FreqIncr
    *GET,Disp_Center_X_0_Vs%Vs%(ifreq,3),VARI,102,PHASE,(ifreq-1)*FreqIncr
    *GET,Disp_Center_X_0_Vs%Vs%(ifreq,4),VARI,102,REAL,(ifreq-1)*FreqIncr
    *GET,Disp_Center_X_0_Vs%Vs%(ifreq,5),VARI,102,IMAG,(ifreq-1)*FreqIncr
*enddo
/MKDIR,Results_Ansys\onlyfooting\n_storeys_%n_storeys%_n_rooms_X_%n_roomsx%_n_rooms_Y_%n_roomsy%_l%l%_by_b%b%_ftyp_%ftyp%_Vs_%Vs%_Lf_%L_f%_Bf_%B_f%
*CFOPEN,'Results_Ansys\onlyfooting\n_storeys_%n_storeys%_n_rooms_X_%n_roomsx%_n_rooms_Y_%n_roomsy%_l%l%_by_b%b%_ftyp_%ftyp%_Vs_%Vs%_Lf_%L_f%_Bf_%B_f%\Disp_Center_X_0_Vs%Vs%','csv',              ! Open a command file
*VWRITE
(2x,'Freq',14x,'AMPL',14x,'PHASE',10x,'REAL',10x,'IMAG')
*VWRITE,Disp_Center_X_0_Vs%Vs%(1,1),Disp_Center_X_0_Vs%Vs%(1,2),Disp_Center_X_0_Vs%Vs%(1,3),Disp_Center_X_0_Vs%Vs%(1,4),Disp_Center_X_0_Vs%Vs%(1,5),,,,       ! Write the data to a file
(E14.7,2x,E14.7,2x,E14.7,2x,E14.7,2x,E14.7)
*CFCLOS
!-------------------------------------------------------------------------------------------!
!-------------------------------------------------------------------------------------------!
NSEL,All
NSOL, 103, n_center_0, U, Y, Center_0
prvar,103
*DIM,Disp_Center_Y_0_Vs%Vs%,ARRAY,nfreq,5,1
*do,ifreq,1,nfreq,1
    freq = StarFreq+(ifreq-1)*FreqIncr                                	 !FD
	*GET,Disp_Center_Y_0_Vs%Vs%(ifreq,1),VARI,1,REAL,(ifreq-1)*FreqIncr
    *GET,Disp_Center_Y_0_Vs%Vs%(ifreq,2),VARI,103,AMPL,(ifreq-1)*FreqIncr
    *GET,Disp_Center_Y_0_Vs%Vs%(ifreq,3),VARI,103,PHASE,(ifreq-1)*FreqIncr
    *GET,Disp_Center_Y_0_Vs%Vs%(ifreq,4),VARI,103,REAL,(ifreq-1)*FreqIncr
    *GET,Disp_Center_Y_0_Vs%Vs%(ifreq,5),VARI,103,IMAG,(ifreq-1)*FreqIncr
*enddo
/MKDIR,Results_Ansys\onlyfooting\n_storeys_%n_storeys%_n_rooms_X_%n_roomsx%_n_rooms_Y_%n_roomsy%_l%l%_by_b%b%_ftyp_%ftyp%_Vs_%Vs%_Lf_%L_f%_Bf_%B_f%
*CFOPEN,'Results_Ansys\onlyfooting\n_storeys_%n_storeys%_n_rooms_X_%n_roomsx%_n_rooms_Y_%n_roomsy%_l%l%_by_b%b%_ftyp_%ftyp%_Vs_%Vs%_Lf_%L_f%_Bf_%B_f%\Disp_Center_Y_0_Vs%Vs%','csv',              ! Open a command file
*VWRITE
(2x,'Freq',14x,'AMPL',14x,'PHASE',10x,'REAL',10x,'IMAG')
*VWRITE,Disp_Center_Y_0_Vs%Vs%(1,1),Disp_Center_Y_0_Vs%Vs%(1,2),Disp_Center_Y_0_Vs%Vs%(1,3),Disp_Center_Y_0_Vs%Vs%(1,4),Disp_Center_Y_0_Vs%Vs%(1,5),,,,       ! Write the data to a file
(E14.7,2x,E14.7,2x,E14.7,2x,E14.7,2x,E14.7)
*CFCLOS
!-------------------------------------------------------------------------------------------!
!-------------------------------------------------------------------------------------------!
NSEL,All
!-------------------------------------------------------------------------------------------!
!-------------------------------------------------------------------------------------------!
!*END 										! Close the macro file
!/INPUT,ansuitmp 							! Run the macro file
!FINISH 										! Finish and Exit Postprocessor
