!---Plot modes for the whole system

!-----Mode 1
/PNUM,ELEM,0
eplot
/POST1
SET,LIST
SET,FIRST
!SET,next
PLDISP,1
/EFACET,1
PLNSOL, U,SUM, 1,1.0
!---------------------------------------------------------------------------!
!---------------------------------------------------------------------------!
!---------------------------------------------------------------------------!

/VIEW,1,1,2,3
/ANG,1,-120,XS,1
/REP,FAST
/ANG,1,-60,YS,1
/REP,FAST
/ANG,1,-10,ZS,1
/REP,FAST
/ANG,1,30,XS,1
/REP,FAST

/NUM,1
/PNUM,MAT,1
/REP,FAST
!/IMAGE, SAVE, ftyp%ftyp%_ModAn_%ModAn%, JPEG, --
!/MKDIR,SAVE_FIG
!/INPUT,'fn_post\Save_Plot','mac'

!---------------------------------------------------------------------------!
!---------------------------------------------------------------------------!
!---------------------------------------------------------------------------!
*do,i_mode,1,n_modes,delta_mode_extract
SET,LIST,999
SET,,, ,,, ,i_mode
/EFACET,1
PLNSOL, U,SUM, 0,1.0
/INPUT,'fn_post\Save_Plot','mac'
*enddo

!/INPUT,'fn_post\Save_Plot','mac'
! ---Display and Animate Current Mode Shapes---!
!PLDI,1,
!ANMODE,20,0.05, ,0
!*
!/ANFILE,SAVE,'ex_mod_sim_1','avi',' '

/MKDIR,Results_Ansys\Results_Modal\ftyp_%ftyp%_ModAn_%ModAn%_Vs_%Vs%_nstr_%n_storeys%
!!!!!!!!---save eigenfrequencies to freqvec.txt--- !
/output,Results_Ansys\Results_Modal\ftyp_%ftyp%_ModAn_%ModAn%_Vs_%Vs%_nstr_%n_storeys%\freqvec,csv
set,list
/output,term
!MODES=30
! ---save eigenvectors to modes.txt--- !
!nsel,s,node,,all !output results for all nodes
!/output,Results_Ansys\Results_Modal\ftyp_%ftyp%_ModAn_%ModAn%_Vs_%Vs%_nstr_%n_storeys%\modes,csv
!*do,i,1,n_modes !output the n_modes first modes
!set,,i
!prdisp
!*enddo
!/output,term


!*GET,nbmode,ACTIVE,0,SOLU,NCMSS
!*DIM,PF,ARRAY,nbmode,20
!*do,i,1,nbmode
!SET,1,i
!*GET,PF(i,1),MODE,i,PFACT,,DIREC,X
!*GET,PF(i,2),MODE,i,PFACT,,DIREC,Y
!*GET,PF(i,3),MODE,i,PFACT,,DIREC,Z
!*GET,PF(i,4),MODE,i,PFACT,,DIREC,ROTX
!*GET,PF(i,5),MODE,i,PFACT,,DIREC,ROTY
!*GET,PF(i,6),MODE,i,PFACT,,DIREC,ROTZ
!*enddo
!*CFOPEN,ParticipationFactor,txt,'Results_Ansys\Results_Modal'
!*VWRITE,PF(1,1),PF(1,2),PF(1,3),PF(1,4),PF(1,5),PF(1,6)
!(6(' ',F10.5))
!*CFCLOS

*GET,n_modes,ACTIVE,0,SOLU,NCMSS

*DIM,MODAL_PF,ARRAY,n_modes,3
*DIM,MODAL_EM,ARRAY,n_modes,3
*DIM,MODAL_RAT,ARRAY,n_modes,1

*DO,i,1,n_modes

    SET,1,i

    *GET,MODAL_PF(i,1),MODE,i,PFACT,,DIREC,X

    *GET,MODAL_PF(i,2),MODE,i,PFACT,,DIREC,Y

    *GET,MODAL_PF(i,3),MODE,i,PFACT,,DIREC,Z

    *GET,MODAL_EM(i,1),MODE,i,MODM,,DIREC,X

    *GET,MODAL_EM(i,2),MODE,i,MODM,,DIREC,Y

    *GET,MODAL_EM(i,3),MODE,i,MODM,,DIREC,Z

    *get,totmassx,ELEM,0,MTOT,X
    !MODAL_RAT(i,1)=MODAL_EM(i,1)/totmassx
    *get,totmassy,ELEM,0,MTOT,Y
    *get,totmassz,ELEM,0,MTOT,Z

*ENDDO

*CFOPEN,PF,txt,'Results_Ansys\Results_Modal'

*VWRITE,MODAL_PF(1,1), MODAL_PF(1,2), MODAL_PF(1,3), MODAL_EM(1,1), MODAL_EM(1,2) ,MODAL_EM(1,3)
(F15.6,F15.6,F15.6,F15.6,F15.6,F15.6)

*CFCLOS
*CFOPEN,totmass,txt,'Results_Ansys\Results_Modal'
*VWRITE, totmassx, totmassy, totmassz
(F15.6,F15.6,F15.6)
*CFCLOS

FINISH 										! Finish and Exit Postprocessor
