!!!!!! Either use read input from or paste the following file in the command
!!!!!! line starting with /INPUT
!---------------------------------------------------------------------------!
!---------------------------------------------------------------------------!
!!!!!! ftyp: foundation for the input building can be a footing or plate foundation
!---------------------------------------------------------------------------!
!---------------------------------------------------------------------------!
/CLEAR,NOSTART  ! Clear model since no SAVE found

!---------------------------------------------------------------------------!
!---------------------------------------------------------------------------!
ftyp='PLATE'
!ftyp='FOOTING'
ModAn='fixed_base'

!---------------------------------------------------------------------------!
!---------------------------------------------------------------------------!
!---------------------------------------------------------------------------!
/INPUT,'fn_pre\Pre_Para_main','mac'
!---------------------------------------------------------------------------!
!---------------------------------------------------------------------------!
*IF,ftyp,EQ,'FOOTING',THEN
    /INPUT,'fn_pre\Pre_BldMod_FootingFndtn','mac'
*ELSEIF,ftyp,EQ,'PLATE'
    /INPUT,'fn_pre\Pre_BldMod_PlateFndtn','mac'
*ENDIF
!---------------------------------------------------------------------------!
!---------------------------------------------------------------------------!
!-------------------------------Mode Analysis-------------------------------!
n_modes=10                     ! Number of modes to extract
Star_ModeFreq=0                 ! Starting frequency
End_ModeFreq=100                ! End frequency
!------------------------------Mode Extraction------------------------------!
delta_mode_extract=1            ! Save the deformation figure of the every
                                ! (delta_mode_extract)th mode
!---------------------------------------------------------------------------!
!---------------------------------------------------------------------------!
NSEL,S,LOC,Z,0
CM, n_base, NODE
NSEL,ALL
D,n_base,ux,0
D,n_base,uy,0
D,n_base,uz,0
D,n_base,rotx,0
D,n_base,roty,0
D,n_base,rotz,0
NSEL,ALL
FINISH
!---------------------------------------------------------------------------!
!---------------------------------------------------------------------------!


/INPUT,'fn_analysis\Analysis_Modal','mac'
!---------------------------------------------------------------------------!
!---------------------------------------------------------------------------!
!---------------------------------------------------------------------------!
/INPUT,'fn_post\Settings_Export_Pictures','mac'
/INPUT,'fn_post\post_Modal','mac'
